*Heading
** Job name: Base Model name: Base
** Generated by: Abaqus/CAE 6.14-1
*Preprint, echo=NO, model=NO, history=NO, contact=NO
**
** PARTS
**
*Part, name=PART-1
*Node
      1, -0.0250000004, 0.00499999989,           0.
      2, -0.0250000004, 0.00353553006, 0.00353553006
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*Element, type=S8R
 1,  17,  43,  56,  24,  55, 133, 134,  32
 2,  43,  42,  63,  56,  54, 135, 136, 133
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*Nset, nset=NALL, generate
   1,  304,    1
*Nset, nset=LEFTFIXED, generate
  1,  16,   1
*Nset, nset=RIGHTFIXED, generate
 17,  32,   1
*Nset, nset=TOP
  1, 17, 33, 34, 35, 36
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*Elset, elset=EALL, generate
  1,  96,   1
*Elset, elset=SOLID, generate
  1,  96,   1
*Elset, elset=_PICKEDSET8, internal, generate
  1,  96,   1
** Section: Section-1-_PICKEDSET8
*Shell Section, elset=_PICKEDSET8, material=MATERIAL, offset=0.5
0.001, 5
*End Part
**
**
** ASSEMBLY
**
*Assembly, name=Assembly
**
*Instance, name=PART-1-1, part=PART-1
*End Instance
**
*Elset, elset=EALL, instance=PART-1-1, generate
  1,  96,   1
*Nset, nset=LEFTFIXED, instance=PART-1-1, generate
  1,  16,   1
*Nset, nset=NALL, instance=PART-1-1, generate
   1,  304,    1
*Nset, nset=RIGHTFIXED, instance=PART-1-1, generate
 17,  32,   1
*Elset, elset=SOLID, instance=PART-1-1, generate
  1,  96,   1
*Nset, nset=TOP, instance=PART-1-1
  1, 17, 33, 34, 35, 36
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*Nset, nset=WALLOUTSIDE, instance=PART-1-1, generate
   1,  304,    1
*Elset, elset=_MOVINGSURFACE0_SNEG, internal, instance=PART-1-1, generate
  1,  96,   1
*Surface, type=ELEMENT, name=MOVINGSURFACE0
_MOVINGSURFACE0_SNEG, SNEG
*End Assembly
**
** MATERIALS
**
*Material, name=MATERIAL
*Density
1200.,
*Elastic
300000., 0.3
**
** BOUNDARY CONDITIONS
**
** Name: Disp-BC-1 Type: Displacement/Rotation
*Boundary
LEFTFIXED, 1, 1
** Name: Disp-BC-2 Type: Displacement/Rotation
*Boundary
LEFTFIXED, 2, 2
** Name: Disp-BC-3 Type: Displacement/Rotation
*Boundary
LEFTFIXED, 3, 3
** Name: Disp-BC-4 Type: Displacement/Rotation
*Boundary
RIGHTFIXED, 1, 1
** Name: Disp-BC-5 Type: Displacement/Rotation
*Boundary
RIGHTFIXED, 2, 2
** Name: Disp-BC-6 Type: Displacement/Rotation
*Boundary
RIGHTFIXED, 3, 3
** ----------------------------------------------------------------
**
** STEP: Step-1
**
*Step, name=Step-1, nlgeom=YES, inc=1
*Dynamic,application=QUASI-STATIC,direct,nohaf,initial=NO
0.0001,0.0001,
**
** LOADS
**
** Name: SURFFORCE-1   Type: Pressure
*Dsload, op=NEW
MOVINGSURFACE0, PNU, 1.
** Name: SurfaceTraction-1   Type: Surface traction
*Dsload, op=NEW
MOVINGSURFACE0, TRVECNU, 1., 1., 0., 0.
**
** OUTPUT REQUESTS
**
*Restart, write, overlay, frequency=99999
**
** FIELD OUTPUT: F-Output-2
**
*Output, field, frequency=99999
*Node Output
A, CF, RF, U, V
*Element Output, directions=YES
LE, P, PE, PEEQ, PEMAG, S
*Contact Output
CDISP, CSTRESS
**
** FIELD OUTPUT: F-Output-1
**
*Node Output, nset=WALLOUTSIDE
COORD, U
**
** HISTORY OUTPUT: H-Output-1
**
*Output, history, variable=PRESELECT, frequency=99999
*End Step
